*Heading
** Job name: Job-L001-T000 Model name: Model-L001-T000
** Generated by: Abaqus/CAE 2020
*Preprint, echo=NO, model=NO, history=NO, contact=NO
**
** PARTS
**
*Part, name=Part-Layer+Solid
*Node
      1,   1.89999998,          -5., 0.0299999993
      2,   1.89999998,          -5., 0.0599999987
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*Element, type=DC3D8
 1,  105, 1059, 3339, 1005,    1,   61,  987,   80
 2, 1059,  109, 1032, 3339,   61,    2,   62,  987
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*Nset, nset=Set-Part-Layer+Solid, generate
    1,  4220,     1
*Elset, elset=Set-Part-Layer+Solid, generate
    1,  2784,     1
*Nset, nset=Set-LS-Yax-TopBot
   1,   2,   3,   4,   5,   6
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*Elset, elset=Set-LS-Yax-TopBot
    1,    2,   19,   20,   21,   22
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*Nset, nset=Set-LS-Yax-Middle
   5,   6,   7,   8,   9,  14
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*Elset, elset=Set-LS-Yax-Middle
  185,  186,  196,  198,  203,  204
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*Nset, nset=Set-LS-Xax-FarfromFocus_1
   5,   6,   7,   9,  27,  29
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*Elset, elset=Set-LS-Xax-FarfromFocus_1
   62,   64,   66,   68,   70,   72
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*Nset, nset=Set-LS-Xax-FarfromFocus_2
  19,  20,  21,  22,  23,  24
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*Elset, elset=Set-LS-Xax-FarfromFocus_2
  153,  154,  155,  156,  157,  158
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*Nset, nset=Set-LS-Xax-InFocus
  10,  11,  12,  13,  14,  15
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*Elset, elset=Set-LS-Xax-InFocus
   81,   82,   83,   84,   85,   86
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** Section: Section-S
*Solid Section, elset=Set-Part-Layer+Solid, material=SS316L-Solid-AsBuilt
,
*End Part
**
*Part, name=Part-Powder
*Node
      1,          2.5,         -2.5,           0.
      2,         -2.5,         -2.5,           0.
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*Element, type=DC3D8
  1, 149,  58,  57, 131, 461, 370, 369, 443
  2,  61, 153, 154,  62, 373, 465, 466, 374
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*Nset, nset=Set-Part-Powder, generate
   1,  624,    1
*Elset, elset=Set-Part-Powder, generate
   1,  262,    1
** Section: Section-P
*Solid Section, elset=Set-Part-Powder, material=SS316L-Powder
,
*End Part
**
*Part, name=Part-Sub
*Node
      1,           5.,           5.,           2.
      2,           5.,           4.,           2.
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*Element, type=DC3D8
  1,  34,  35,  46,  45,   1,   2,  13,  12
  2,  35,  36,  47,  46,   2,   3,  14,  13
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*Nset, nset=Set-Part-Sub, generate
   1,  363,    1
*Elset, elset=Set-Part-Sub, generate
   1,  200,    1
** Section: Section-S
*Solid Section, elset=Set-Part-Sub, material=SS316L-Solid-AsBuilt
,
*End Part
**
**
** ASSEMBLY
**
*Assembly, name=Assembly
**
*Instance, name=Part-Layer+Solid, part=Part-Layer+Solid
          0.,           0.,           2.
          0.,           0.,           2.,           0.,           0., 3.00000001268805, 89.9999992730282
*End Instance
**
*Instance, name=Part-Powder, part=Part-Powder
          0.,           0.,           2.
          0.,           0.,           2.,           0.,           0., 3.00000001268805, 89.9999992730282
*End Instance
**
*Instance, name=Part-Sub, part=Part-Sub
*End Instance
**
*Nset, nset=Part-Sub-face-Bottom, instance=Part-Sub
  23,  24,  25,  26,  27,  28
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*Elset, elset=Part-Sub-face-Bottom, instance=Part-Sub
  11,  12,  13,  14,  15,  16
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*Nset, nset=Set-All, instance=Part-Layer+Solid, generate
    1,  4220,     1
*Nset, nset=Set-All, instance=Part-Powder, generate
   1,  624,    1
*Nset, nset=Set-All, instance=Part-Sub, generate
   1,  363,    1
*Elset, elset=Set-All, instance=Part-Layer+Solid, generate
    1,  2784,     1
*Elset, elset=Set-All, instance=Part-Powder, generate
   1,  262,    1
*Elset, elset=Set-All, instance=Part-Sub, generate
   1,  200,    1
*Elset, elset=_Part-Layer+Solid-face-Bottom_S4, internal, instance=Part-Layer+Solid, generate
 2341,  2673,     1
*Elset, elset=_Part-Layer+Solid-face-Bottom_S5, internal, instance=Part-Layer+Solid, generate
 2674,  2784,     1
*Surface, type=ELEMENT, name=Part-Layer+Solid-face-Bottom
_Part-Layer+Solid-face-Bottom_S4, S4
_Part-Layer+Solid-face-Bottom_S5, S5
*Elset, elset=_Part-Layer+Solid-face-Side1_S4, internal, instance=Part-Layer+Solid, generate
 2710,  2784,    37
*Elset, elset=_Part-Layer+Solid-face-Side1_S1, internal, instance=Part-Layer+Solid
 2449, 2450, 2451, 2668, 2669, 2670
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*Elset, elset=_Part-Layer+Solid-face-Side1_S2, internal, instance=Part-Layer+Solid
 2341, 2342, 2343, 2452, 2453, 2454, 2455, 2456, 2457
*Elset, elset=_Part-Layer+Solid-face-Side1_S6, internal, instance=Part-Layer+Solid, generate
 2674,  2748,    37
*Elset, elset=_Part-Layer+Solid-face-Side1_S5, internal, instance=Part-Layer+Solid, generate
 2457,  2673,     6
*Surface, type=ELEMENT, name=Part-Layer+Solid-face-Side1
_Part-Layer+Solid-face-Side1_S4, S4
_Part-Layer+Solid-face-Side1_S1, S1
_Part-Layer+Solid-face-Side1_S2, S2
_Part-Layer+Solid-face-Side1_S6, S6
_Part-Layer+Solid-face-Side1_S5, S5
*Elset, elset=_Part-Layer+Solid-face-Top_S6, internal, instance=Part-Layer+Solid
   81,   83,   85,   87,   89,   91
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*Elset, elset=_Part-Layer+Solid-face-Top_S4, internal, instance=Part-Layer+Solid
    2,    4,    6,    8,   10,   12
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*Elset, elset=_Part-Layer+Solid-face-Top_S1, internal, instance=Part-Layer+Solid, generate
 1899,  1910,     1
*Elset, elset=_Part-Layer+Solid-face-Top_S5, internal, instance=Part-Layer+Solid
  931,  932,  933,  934,  935,  936
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*Surface, type=ELEMENT, name=Part-Layer+Solid-face-Top
_Part-Layer+Solid-face-Top_S6, S6
_Part-Layer+Solid-face-Top_S4, S4
_Part-Layer+Solid-face-Top_S1, S1
_Part-Layer+Solid-face-Top_S5, S5
*Elset, elset=_Part-Powder-face-Bottom_S1, internal, instance=Part-Powder, generate
   1,  262,    1
*Surface, type=ELEMENT, name=Part-Powder-face-Bottom
_Part-Powder-face-Bottom_S1, S1
*Elset, elset=_Part-Powder-face-Side1_S3, internal, instance=Part-Powder
  34,  38,  40,  48,  52,  54,  61,  65,  74,  77,  96, 103, 105, 110, 117, 119
*Elset, elset=_Part-Powder-face-Side1_S5, internal, instance=Part-Powder
  86,  88,  91,  92,  97, 104, 111, 118, 159, 173
*Elset, elset=_Part-Powder-face-Side1_S6, internal, instance=Part-Powder
 130, 145, 161, 175
*Elset, elset=_Part-Powder-face-Side1_S4, internal, instance=Part-Powder
  98, 112
*Surface, type=ELEMENT, name=Part-Powder-face-Side1
_Part-Powder-face-Side1_S3, S3
_Part-Powder-face-Side1_S5, S5
_Part-Powder-face-Side1_S6, S6
_Part-Powder-face-Side1_S4, S4
*Elset, elset=_Part-Powder-face-Top_S2, internal, instance=Part-Powder, generate
   1,  262,    1
*Surface, type=ELEMENT, name=Part-Powder-face-Top
_Part-Powder-face-Top_S2, S2
*Elset, elset=_Part-Sub-face-Bottom_S5, internal, instance=Part-Sub
  11,  12,  13,  14,  15,  16
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*Surface, type=ELEMENT, name=Part-Sub-face-Bottom
_Part-Sub-face-Bottom_S5, S5
*Elset, elset=_Part-Sub-face-Top_S3, internal, instance=Part-Sub
   1,   2,   3,   4,   5,   6
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*Surface, type=ELEMENT, name=Part-Sub-face-Top
_Part-Sub-face-Top_S3, S3
** Constraint: Constraint-SubTop-PowBot
*Tie, name=Constraint-SubTop-PowBot, adjust=yes
Part-Powder-face-Bottom, Part-Sub-face-Top
** Constraint: Constraint-SubTop-SolBot
*Tie, name=Constraint-SubTop-SolBot, adjust=yes
Part-Layer+Solid-face-Bottom, Part-Sub-face-Top
*End Assembly
**
** MATERIALS
**
*Material, name=SS316L
*Conductivity, dependencies=1
 0.174828,100.,  0.
 0.212441,200.,  0.
 0.184826,300.,  0.
 0.209005,400.,  0.
 0.233117,500.,  0.
  12.1772,100.,  1.
  14.2936,200.,  1.
  16.0707,300.,  1.
  17.1011,400.,  1.
  17.4675,500.,  1.
*Density, dependencies=1
 4.1593e-09,100.,  0.
 4.1379e-09,200.,  0.
 4.1165e-09,300.,  0.
 4.0952e-09,400.,  0.
 4.0738e-09,500.,  0.
 7.5549e-09,100.,  1.
 7.5128e-09,200.,  1.
 7.4708e-09,300.,  1.
 7.4287e-09,400.,  1.
 7.3866e-09,500.,  1.
*Depvar
      4,
*Specific Heat, dependencies=1
 4.383e+08,100.,  0.
 4.848e+08,200.,  0.
 5.276e+08,300.,  0.
  5.59e+08,400.,  0.
 6.408e+08,500.,  0.
  4.52e+08,100.,  1.
  5.17e+08,200.,  1.
  5.57e+08,300.,  1.
  5.93e+08,400.,  1.
 6.155e+08,500.,  1.
*User Defined Field
*Material, name=SS316L-Powder
*Conductivity
 0.174828,100.
 0.212441,200.
 0.184826,300.
 0.209005,400.
 0.233117,500.
*Density
 4.1593e-09,100.
 4.1379e-09,200.
 4.1165e-09,300.
 4.0952e-09,400.
 4.0738e-09,500.
*Depvar
      4,
*Specific Heat
 4.383e+08,100.
 4.848e+08,200.
 5.276e+08,300.
  5.59e+08,400.
 6.408e+08,500.
*User Defined Field
*Material, name=SS316L-Solid-AsBuilt
*Conductivity
 12.1772,100.
 14.2936,200.
 16.0707,300.
 17.1011,400.
 17.4675,500.
*Density
 7.5549e-09,100.
 7.5128e-09,200.
 7.4708e-09,300.
 7.4287e-09,400.
 7.3866e-09,500.
*Depvar
      4,
*Specific Heat
  4.52e+08,100.
  5.17e+08,200.
  5.57e+08,300.
  5.93e+08,400.
 6.155e+08,500.
*User Defined Field
**
** INTERACTION PROPERTIES
**
*Surface Interaction, name=P-S-Contact
1.,
*Gap Conductance
10000.,   0.
    0., 0.01
*Surface Interaction, name=Perfect-Contact
1.,
*Gap Conductance
 1e+10,  0.
    0., 0.1
**
** PREDEFINED FIELDS
**
** Name: Predefined Field-1   Type: Temperature
*Initial Conditions, type=TEMPERATURE
Set-All, 200.
**
** INTERACTIONS
**
** Interaction: Int-PowSol-Inside
*Contact Pair, interaction=P-S-Contact, type=SURFACE TO SURFACE
Part-Layer+Solid-face-Side1, Part-Powder-face-Side1
** ----------------------------------------------------------------
**
** STEP: Step-1
**
*Step, name=Step-1, nlgeom=NO, inc=1000000
*Heat Transfer, end=PERIOD, deltmx=1e+06
1e-06, 0.00555556, 1e-11, 0.0004,
**
** BOUNDARY CONDITIONS
**
** Name: BC-1 Type: Temperature
*Boundary
Part-Sub-face-Bottom, 11, 11, 200.
**
** LOADS
**
** Name: Load-1   Type: Surface heat flux
*Dsflux
Part-Layer+Solid-face-Top, SNU, 1.
**
** INTERACTIONS
**
** Interaction: Top_Surf_FilmCondi
*Sfilm
Part-Layer+Solid-face-Top, F, 200., 0.015
**
** CONTROLS
**
*Controls, reset
*Controls, parameters=time incrementation
, , , , , , , 20, , ,
**
** OUTPUT REQUESTS
**
*Restart, write, frequency=50
**
** FIELD OUTPUT: F-Output-1
**
*Output, field
*Node Output
NT,
*Element Output, directions=YES
HFL, SDV
*Output, history, frequency=5
*End Step
